// COMSOL Multiphysics 6.3.0.290 model "BiOCl_piezo.mph"
// Outline of the model tree

Selections
  sel1: Explicit on edges 2, 3

Geometry
  geom1 "几何 1" (3D, length unit m)
    blk1: Block "长方体 1" | size = {2e-07, 2e-07, 5e-09}; base = center
    fin: Finalize "形成联合体"

Materials
  mat1: Common "BiOCl" on all domains
    def: def "基本"
      density = 7500
      relpermittivity = diag{50.163, 50.163, 13.120}

Physics
  solid: SolidMechanics "固体力学" on all domains
    dependent variable u = {u, v, w}
    lemm1: LinearElasticModel "线弹性材料 1" (default)
      SolidModel = Anisotropic
      AnisotropicMatrixOption = Elasticity
      D_mat = userdef
      D = {1.3612e11, 6.981e10, 3.690e10, 0, 0, 0, 6.981e10, 1.3612e11, 3.690e10, 0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}
    free1: Free "自由 1" (default)
    init1: init "初始值 1" (default)
    pzm1: PiezoelectricMaterialModel "压电材料 1" on domains 1
      ConstitutiveRelation = StrainCharge
      MixedFormulation = none
      sE_mat = userdef
      sE = {1.27e-11, -5.67e-12, -4.86e-12, 0, 0, 0, -5.67e-12, 1.27e-11, -4.86e-12, 0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}
      dET_mat = userdef
      dET = {0, 0, 0, 0, 0, 0, 0, 0, 5e-12, 0, 0, 0, 0, 0, 0, 0, 0, 0}
      epsilonrT_mat = userdef
      epsilonrT = diag{50.163, 50.163, 13.12}
    fix1: Fixed "固定约束 1" on edges 2, 3, 7, 10
    bndl1: BoundaryLoad "边界载荷 1" on boundaries 4 | forceType = FollowerPressure; pressure = 1e6
  es: Electrostatics "静电" on all domains
    dependent variable V
    fsp1: FreeSpace "自由空间 1" (default)
    zc1: ZeroCharge "零电荷 1" (default)
    init1: init "初始值 1" (default)
    gnd1: Ground "接地 1" on boundaries 3
    pot1: ElectricPotential "电势 1" on boundaries 4 | V0 = 1

Multiphysics
  pze1: PiezoelectricEffect "压电 1" on all domains | Solid_physics = solid; Electrostatics_physics = es

Mesh
  mesh1 "网格 1" (physics-controlled)
    size: MeshSizeDefault "大小" | hauto = 4

Studies
  std1 "研究 1"
    stat: Stationary "稳态"

Solver configurations
  sol1 "解 1" (study std1)
    v1: Variables "因变量 1"
    s1: Stationary "稳态求解器 1"
      se1: Segregated "分离 1"
        ss1: SegregatedStep "静电"
        ss2: SegregatedStep "固体力学"
      i1: Iterative "迭代 1"
        mg1: Multigrid "多重网格 1"
      d1: Direct "建议的直接求解器 (solid)"

Datasets
  dset1: Solution | solution = sol1

Plots
  pg1: PlotGroup3D "应力 (solid)" | data = dset1
    vol1: Volume "体 1" | expr = solid.misesGp
      def: Deform "变形" | expr = {u, v, w}; descr = 位移场
  pg2: PlotGroup3D "电势 (es)" | data = dset1
    mslc1: Multislice "多切面 1"
      expr = V
      multiplanexmethod = coord
      xcoord = es.CPx
      multiplaneymethod = coord
      ycoord = es.CPy
      multiplanezmethod = coord
      zcoord = es.CPz
    strmsl1: StreamlineMultislice "多切面上的流线 1"
      expr = {es.Ex, es.Ey, es.Ez}
      multiplanexmethod = coord
      xcoord = es.CPx
      multiplaneymethod = coord
      ycoord = es.CPy
      multiplanezmethod = coord
      zcoord = es.CPz
      udist = 0.02
      maxsteps = 5000
      col1: Color "颜色表达式 1" | expr = V
      filt1: Filter "过滤器 1" | expr = !isScalingSystemDomain
  pg3: PlotGroup3D "电场 (es)" | data = dset1
    mslc1: Multislice "多切面 1"
      expr = es.normE
      multiplanexmethod = coord
      xcoord = es.CPx
      multiplaneymethod = coord
      ycoord = es.CPy
      multiplanezmethod = coord
      zcoord = es.CPz
    strmsl1: StreamlineMultislice "多切面上的流线 1"
      expr = {es.Ex, es.Ey, es.Ez}
      multiplanexmethod = coord
      xcoord = es.CPx
      multiplaneymethod = coord
      ycoord = es.CPy
      multiplanezmethod = coord
      zcoord = es.CPz
      udist = 0.02
      maxsteps = 5000
      col1: Color "颜色表达式 1" | expr = es.normE
      filt1: Filter "过滤器 1" | expr = !isScalingSystemDomain
  pg4: PlotGroup3D "电势云图" | data = dset1
    surf1: Surface "表面 1" | data = dset1; expr = V; unit = V